# Рассчёт движения по налконной поверхности
# Исходные данные
a := 0  # м / сек^2
V := 0.5  # м/с
Mrobot := 3  # кг
d := 0.085  # м
θ := 30  # град
θ := θ*2*π/360 = 0.523599  # радиан
# Коэффициент сопротивления качению :
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# Возьмём для сухого песка
f := 0.3
g := 9.8  # м / с^2
n := 3  # число колёс на земле
m := Mrobot/n = 1  # кг  # масса робота, приходящаяся на одно колесо
# Коэффициент сцепления шин с дорогой:
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# Возьмём сухое асфальтобетонное покрытие
φ := 0.8
# Рассчёты
Rx := m*a + m*g*sin(θ) = 4.9  # Н
Ry := m*g*cos(θ) = 8.48705  # Н
Rxmax := Rx*φ = 3.92  # Н
M := Rxmax*d/2 + Ry*f*d/2 = 0.27481  # Н * м
M := (φ*(a + g*sin(θ)) + g*cos(θ)*f)*m*d/2 = 0.27481  # Н * м
S := 1  # коэффициент запаса ??
M := M*S = 0.27481  # Н * м
w := V*2/d = 11.7647  # 1 / сек
nвращ := w/(2*π) = 1.87241  # об / сек
# n вращ =
nвращ*60 = 112.345  # об / мин
P := M*w = 3.23306  # Вт
# Требования к двигателю
# Частота вращения выходного вала:
nвращ*60 = 112.345  # об / мин
# Крутящий момент на выходном валу :
M = 0.27481  # Н*м
# Мощность :
P = 3.23306  # Вт
# Попробуем посчитать аккумы:
Pобщ := P*4 = 12.9322
Volt := 5
I := Pобщ/Volt = 2.58645
t := 3
АКБ := t*I = 7.75934
