# Рассчёт движения по лестнице
# Исходные данные
a := 0  # м / сек^2
V := 0.5  # м/с
Mrobot := 3  # кг
d := 0.085  # м
θ := 30  # град
θ := θ*2*π/360 = 0.523599  # радиан
# Коэффициент сопротивления качению :
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# Возьмём для сухого песка
f := 0.3
g := 9.8  # м / с^2
n := 3  # число колёс на земле
m := Mrobot/n = 1  # кг  # масса робота, приходящаяся на одно колесо
# Коэффициент сцепления шин с дорогой:
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# Возьмём сухое асфальтобетонное покрытие
φ := 0.8
# Рассчёты
# Критический наклон при подъёме по лестнице:
h := 150  # мм - высота ступеньки
L := 170  # мм - продольная динна колёсной базы
α_max := acos(h/L) = 0.489957  # рад
α_max*360/(2*π) = 28.0725  # градусов
# Наибольший угол подъема, при котором робот может стоять, не опрокидываясь:
h_g := 90  # мм - высота центра тяжести над поверхностью
β_max := atan(L/(2*h_g)) = 0.756835  # рад
β_max*360/(2*π) = 43.3634  # градусов
# Рассчёт движения по лестнице (момент)
# Ввдём слеующие величины (дискретно, чтобы постоить графики):
k := 100
i := 0 .. k
α[i] := α_max*i/k
ϕ[i] := π/2 - α[i] - β_max
ψ[i] := π/2 - α[i] - β_max
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# Сначала геометрия:
gip := sqrt(h_g^2 + (L/2)^2) = 123.794
h1[i] := gip*sin(ψ[i])
h2[i] := gip*cos(ϕ[i])
L1[i] := gip*cos(ψ[i])
L2[i] := gip*sin(ϕ[i])
# Рассчёт:
r := d/2 = 0.0425
e := f*r = 0.01275
M[i] := m*g*(r^2 + r*h2[i] - e*e + e*h1[i])/(h1[i] - e + r + h2[i])
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j := 100
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α[j]*360/(2*π) = 28.0725
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ϕ[j]*360/(2*π) = 18.5641
ψ[j]*360/(2*π) = 18.5641
L1[j] = 117.353
L2[j] = 39.4118
h1[j] = 39.4118
h2[j] = 117.353
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M[j] = 0.34324
# ИТОГ
T := M[j] = 0.34324
T := max(M) = 0.34324
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rpm := 104  # об /сек
d = 0.085  # мм
w := rpm/60*2*π = 10.8909  # 1 / сек
V := w*d/2 = 0.462861  # м / сек
P := T*w = 3.73818  # Вт
# Попробуем посчитать аккумы:
Pобщ := P*4 = 14.9527
Volt := 5
I := Pобщ/Volt = 2.99054
t := 3
АКБ := t*I = 8.97162
