# Попробуем рассчитать заднюю хуйню
T := 0.343
d := 0.085
r := d/2 = 0.0425
For := T/r = 8.07059  # Н
Mrobot := 3
k := 100
i := 0 .. k
q[i] := 2*π*(i - k/2)/k
L1 := 0.1
α[i] := L1*cos(q[i])
β[i] := L1*sin(q[i])
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g := 9.8
Mwheel := Mrobot/2 = 1.5
Grobot := Mwheel*g = 14.7
n := 42
M[i] := Grobot*α[i] - For*β[i]
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q[n]*360/(2*π) = -28.8
max(M) = 1.67697
